** ============================================================
** LARGE ABAQUS TEST FILE - generated for syntax highlight testing
** Target size: ~250KB
** ============================================================

*HEADING
Large mesh test model - 3D solid block
Generated to test syntax highlighting on large inp files

** ---- NODES ------------------------------------------------
*NODE, NSET=ALL_NODES
     1,     0.000000,     0.000000,     0.000000
     2,     0.250000,     0.000000,     0.000000
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
** ---- ELEMENTS ---------------------------------------------
*ELEMENT, TYPE=C3D8R, ELSET=SOLID_ELS
     1,     1,    2,   19,   18,  290,  291,  308,  307
     2,     2,    3,   20,   19,  291,  292,  309,  308
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
** ---- NODE SETS -------------------------------------------
*NSET, NSET=FIXED_FACE
1, 18, 35, 52, 69, 86
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*NSET, NSET=FREE_FACE
2329, 2346, 2363, 2380, 2397, 2414
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
** ---- ELEMENT SETS ----------------------------------------
*ELSET, ELSET=SOLID_ELS, GENERATE
1, 2048, 1

** ---- MATERIAL ---------------------------------------------
*MATERIAL, NAME=STEEL
*DENSITY
7850.0,
*ELASTIC, TYPE=ISOTROPIC
210000.0, 0.3
*PLASTIC
250.0000, 0.0000
269.0325, 0.0100
286.2538, 0.0200
301.8364, 0.0300
315.9360, 0.0400
328.6939, 0.0500
340.2377, 0.0600
350.6829, 0.0700
360.1342, 0.0800
368.6861, 0.0900
376.4241, 0.1000
383.4258, 0.1100
389.7612, 0.1200
395.4936, 0.1300
400.6806, 0.1400
405.3740, 0.1500
409.6207, 0.1600
413.4633, 0.1700
416.9402, 0.1800
420.0863, 0.1900

** ---- SECTION ----------------------------------------------
*SOLID SECTION, ELSET=SOLID_ELS, MATERIAL=STEEL

** ---- STEP : STATIC ----------------------------------------
*STEP, NAME=STATIC_STEP, NLGEOM=YES
*STATIC
0.1, 1.0, 1e-5, 1.0
**
*BOUNDARY, TYPE=DISPLACEMENT
FIXED_FACE, 1, 6, 0.0
**
*CLOAD
FREE_FACE, 3, -5000.0
**
*OUTPUT, FIELD, NUMBER INTERVAL=10
*NODE OUTPUT
U, RF
*ELEMENT OUTPUT, DIRECTIONS=YES
S, E, PE, PEEQ, MISES
*OUTPUT, HISTORY, TIME INTERVAL=0.05
*NODE OUTPUT, NSET=FREE_FACE
U, RF
*END STEP

** ---- END OF FILE ------------------------------------------
